// COMSOL Multiphysics 6.1.0.357 model "Funnel.mph"
// Outline of the model tree

Parameters
  geomHt = subHt+supHt  // simulation height, excluding PML
  geomWd = 15[um]  // simulation width, excluding PML
  pmlSz = 10[um]  // height/width of PML regions
  subHt = 10[um]  // thickness of substrate
  supHt = 10[um]  // thickness of superstrate
  numLayers = 10  // number of bilayers in funnel
  dieHt = 80[nm]  // thickness of dielectric portion of bilayer
  metHt = 80[nm]  // thickness of metal portion of bilayer
  funnelRBot = 3[um]  // radius of bottom of funnel
  funnelRTop = 0.15[um]  // radius at top of funnel
  funnelHt = (dieHt + metHt)*(numLayers)  // height of funnel
  funnelCurve = 1  // 0 is straight line, 1 is bezier
  lam0 = 14[um]  // input vacuum wavelength
  funnelLam0 = 8.5[um]  // reference wavelength, for adiabatic funnel profile
  dieEps = 1  // permittivity of dielectric layers
  subRef = 2  // refractive index of substrate
  metEps = 1-1i  // permittivity of metalic layers
  supRef = 1  // refractive index of superstrate
  goldHt = 1.52[um]  // height of gold cladding
  meshAirMax = 1.4[um]  // maximum mesh size in air
  bezierR = 0.5[um]  // radius of bezier control point
  bezierZ = 0.9[um]  // height of bezier control point
  bezierW = 1  // weight of bezier control point
  meshSmallMax = 0.00875[um]  // maximum mesh size in small mesh region
  meshSubstrateMax = 0.36842[um]
  meshFunnelMax = 0.28[um]
  smallMeshWd = 2*funnelRTop
  smallMeshHt = max(smallMeshWd,1.5*emitterPassiveHt)
  dielectricRadius = 9[um]
  dielectricHeight = 10[um]
  goldMinR = 2.85[um]
  emitterPassiveWd = funnelRTop
  emitterPassiveHt = 300 [nm]
  emitterActiveHt = 200 [nm]
  emitterActiveWd = 0.6*funnelRTop
  emitterEps = 10

Functions
  an1: Analytic | funcname = perturbation; expr = 0.5*sin(pi*s)*1e-6; args = s

Variables
  var1 "Variables 1"
    kzB = subRef*ewfd.k0

Coordinate systems
  pml1: PML "pmlBottom" on selection geom1_csel8_dom | ScalingType = Cylindrical
  pml2: PML "pmlTop" (disabled) on domains 28, 33 | ScalingType = Cylindrical
  pml3: PML "pmlRight" (disabled) on domains 30-32 | ScalingType = Cylindrical

Geometry
  geom1 "Geometry 1" (2D axisymmetric, length unit m)
    if2: If | condition = funnelCurve == 0
    ls3: LineSegment "funnelSurfaceLine"
      contributeto = csel4
      specify1 = coord
      vertex1 = ls2 2
      coord1 = {funnelRBot, 0}
      specify2 = coord
      coord2 = {funnelRTop, funnelHt}
    elseif1: ElseIf | condition = funnelCurve == 1
    qb1: QuadraticBezier "funnelSurfaceBezier"
      contributeto = csel4
      p = {{funnelRBot, bezierR, funnelRTop}, {0, bezierZ, funnelHt}}
      w = {1, bezierW, 1}
    endif2: EndIf
    ccur1: ConvertToCurve | contributeto = csel4; input = selection csel4
    ls1: LineSegment "funnelAxis" | contributeto = csel4; specify1 = coord; coord1 = {0, funnelHt}; specify2 = coord
    ls2: LineSegment "funnelBase"
      contributeto = csel4
      vertex1 = ls1(1) points 2
      specify2 = coord
      coord2 = {funnelRBot, 0}
    ls4: LineSegment "funnelTop"
      contributeto = csel4
      specify1 = coord
      vertex1 = ls3 2
      coord1 = {funnelRTop, funnelHt}
      vertex2 = ls1(1) points 1
    csol1: ConvertToSolid | contributeto = none; input = selection csel4
    r11: Rectangle "smallMeshRegion" | contributeto = csel6; pos = {0, funnelHt}; size = {smallMeshWd, smallMeshHt}
    r15: Rectangle "emitterPassive"
      contributeto = csel14
      pos = {0, funnelHt}
      size = {emitterPassiveWd, emitterPassiveHt}
    r16: Rectangle "emitterActive"
      contributeto = csel13
      pos = {0, funnelHt+(emitterPassiveHt-emitterActiveHt)/2}
      size = {emitterActiveWd, emitterActiveHt}
    r5: Rectangle "substrate"
      contributeto = csel10
      pos = {0, -subHt}
      layername = Layer 1
      layer = subHt/2
      size = {geomWd+pmlSz, subHt}
    r6: Rectangle "superstrate" | contributeto = none; size = {geomWd+pmlSz, supHt}
    r2: Rectangle "pmlBottom" | contributeto = csel10; pos = {0, -pmlSz-subHt}; size = {geomWd+pmlSz, pmlSz}
    r4: Rectangle "pmlTop" | contributeto = csel8; pos = {0, supHt}; size = {geomWd+pmlSz, pmlSz}
    r3: Rectangle "pmlRight" | contributeto = csel8; pos = {geomWd, -pmlSz-subHt}; size = {pmlSz, geomHt + 2*pmlSz}
    r7: Rectangle "metlayer" | contributeto = csel2; size = {funnelRBot*2, metHt}
    r9: Rectangle "dieLayer" | contributeto = csel3; pos = {0, metHt}; size = {funnelRBot*2, dieHt}
    arr1: Array "layerArray"
      contributeto = csel1
      input = r7, r9
      size = numLayers
      type = linear
      linearsize = numLayers
      displ = {0, metHt + dieHt}
    uni1: Union "layerUnion" | input = selection csel1
    uni2: Union "funnelMaterials" | input = uni1
    int1: Intersection | input = csol1, uni2
    if4: If | condition = goldHt != 0
    if3: If | condition = funnelCurve == 0
    ls5: LineSegment "funnelSurfaceLine 1"
      contributeto = csel5
      specify1 = coord
      vertex1 = int1(1) points 122
      coord1 = {funnelRBot, 0}
      specify2 = coord
      coord2 = {funnelRTop, funnelHt}
    elseif3: ElseIf | condition = funnelCurve == 1
    qb2: QuadraticBezier "funnelSurfaceBezier 1"
      contributeto = csel5
      p = {{funnelRBot, bezierR, funnelRTop}, {0, bezierZ, funnelHt}}
      w = {1, bezierW, 1}
    endif3: EndIf
    ccur2: ConvertToCurve | contributeto = csel5; input = selection csel5
    r10: Rectangle | contributeto = csel5; size = {2*funnelRBot, goldHt}
    int2: Intersection | input = selection csel5
    endif4: EndIf
    ls6: LineSegment
      contributeto = csel5
      specify1 = coord
      coord1 = {funnelRBot, 0}
      specify2 = coord
      coord2 = {geomWd+pmlSz, 0}
    r12: Rectangle | contributeto = csel7; pos = {0, goldHt}; size = {2*funnelRBot, 2*funnelHt}
    if5: If | condition = goldMinR > 0
    r13: Rectangle | contributeto = csel7; pos = {0, -funnelHt}; size = {goldMinR, 3*funnelHt}
    endif5: EndIf
    dif1: Difference | input = selection csel5; input2 = selection csel7
    fin: Finalize "Form Union"
    boxsel1: BoxSelection
      entitydim = 2
      inputent = selections
      input = {csel2.dom, csel3.dom}
      xmin = dielectricRadius
      xmax = geomWd
      ymin = -metHt/4
      ymax = dielectricHeight
      contributeto = csel10.dom
    boxsel2: BoxSelection
      entitydim = 1
      xmin = -inf
      xmax = 2*(geomWd+pmlSz)
      ymin = -subHt-pmlSz/2
      ymax = -subHt-pmlSz/4
      contributeto = csel9.bnd
    boxsel3: BoxSelection
      entitydim = 1
      xmin = -inf
      xmax = 2*(geomWd+pmlSz)
      ymin = supHt+pmlSz/2
      ymax = supHt+3*pmlSz/4
      contributeto = csel9.bnd
    boxsel4: BoxSelection
      entitydim = 1
      xmin = geomWd+pmlSz/2
      xmax = geomWd+3*pmlSz/4
      ymin = -inf
      ymax = inf
      contributeto = csel9.bnd
    boxsel5: BoxSelection
      entitydim = 2
      xmin = geomWd+pmlSz/4
      xmax = geomWd+pmlSz/2
      ymin = -subHt-pmlSz/2
      ymax = supHt+pmlSz/2
      contributeto = csel8.dom
    boxsel6: BoxSelection
      entitydim = 2
      xmin = -1[um]
      xmax = geomWd+pmlSz/2
      ymin = -subHt-pmlSz/2
      ymax = -subHt-pmlSz/4
      contributeto = csel8.dom
    boxsel7: BoxSelection
      entitydim = 2
      xmin = -1[um]
      xmax = geomWd+pmlSz/2
      ymin = supHt+pmlSz/4
      ymax = supHt+pmlSz/2
      contributeto = csel8.dom
    boxsel8: BoxSelection
      entitydim = 2
      xmin = geomWd - 0.1[um]
      xmax = geomWd - 0.05[um]
      ymin = supHt - 0.1[um]
      ymax = supHt - 0.05[um]
      contributeto = csel11.dom
    boxsel9: BoxSelection
      entitydim = 1
      xmax = 1.001*geomWd
      ymin = -1.001*subHt
      ymax = -0.999*subHt
      condition = inside
      contributeto = csel16.bnd
    boxsel10: BoxSelection
      entitydim = 1
      xmax = 1.001*geomWd
      ymin = 0.999*supHt
      ymax = 1.001*supHt
      condition = inside
      contributeto = csel17.bnd
    boxsel11: BoxSelection
      entitydim = 1
      xmin = 0.999*geomWd
      xmax = 1.001*geomWd
      ymin = -1.001*subHt
      ymax = 1.001*supHt
      condition = inside
      contributeto = csel18.bnd

Materials
  mat3: Common "superstrate" on all domains
    RefractiveIndex
      n = supRef
      ki = 0
  mat1: Common "metalLayers" on selection geom1_csel2_dom
    RefractiveIndex
      n = sqrt(metEps)
      ki = 0
  mat2: Common "dielectricLayers" on selection geom1_csel3_dom
    RefractiveIndex
      n = sqrt(dieEps)
      ki = 0
  mat4: Common "substrate" on selection geom1_csel10_dom
    RefractiveIndex
      n = subRef
      ki = 0
  mat6: Common "emitter" on selection geom1_csel14_dom
    RefractiveIndex
      n = sqrt(emitterEps)
      ki = 0

Physics
  ewfd: ElectromagneticWavesFrequencyDomain on all domains
    dependent variable E = {Er, Ephi, Ez}
    outofplanewavenumber.mFloquet = 0
    wee1: WaveEquationElectric (default)
      DisplacementFieldModel = RefractiveIndex
      epsilonr_mat = userdef
      epsilonr = 1
      minput_temperature_src = fromCommonDef
    axi1: AxialSymmetry (default)
    pec1: PerfectElectricConductor (default)
    init1: init "Initial Values 1" (default)
    sctr1: Scattering "Scattering Boundary Condition 1" on boundaries 2, 59, 66, 75-80 | WaveType = CylindricalWave
    pec2: PerfectElectricConductor "Gold" on selection geom1_csel5_bnd
    port1: Port (disabled) on boundaries 6
      PortSlit = 1
      SlitType = DomainBacked
      PortOrientation = ForwardPort
      beta = kzB
      E0 = {1, 0+1i, 0}
    ffd1: FarFieldDomain on selection geom1_csel11_dom
      ffc1: FarFieldCalculation on boundaries 4, 58, 67-69, 71, 74
    ecd1: ExternalCurrentDensity on selection geom1_csel13_dom | Je = {0, 0, 1}

Mesh
  mesh1 "Mesh 1"
    size: MeshSizeDefault "Substrate" | hmax = meshSubstrateMax; hmin = 1.38E-8; hgrad = 1.05
    size1: Size "Air" on domains 4-23, 26-28, 32, 33 | hmax = meshAirMax; custom = on
    size2: Size "Small" on selection geom1_csel6_dom | hmax = meshSmallMax; custom = on
    size3: Size "Funnel" on selection geom1_csel1_dom | hmax = meshFunnelMax; custom = on
    dis1: Distribution on selection geom1_csel9_bnd | numelem = 10
    map1: Map "Mapped 1" on selection geom1_csel8_dom | adjustedgdistr = on
    ftri1: FreeTri "Free Triangular 1" on remaining entities

Studies
  std1 "Study 1"
    freq: Frequency "Frequency Domain" | punit = Hz; plist = c_const/lam0

Solver configurations
  sol1 "Solution 1" (study std1)
    v1: Variables "Dependent Variables 1"
    s1: Stationary "Stationary Solver 1" | stol = 0.01
      p1: Parametric | pname = freq; plistarr = c_const/lam0; punit = Hz; pcontinuationmode = no
      fc1: FullyCoupled | linsolver = d1
      d1: Direct "Suggested Direct Solver (ewfd)"

Datasets
  dset1: Solution | solution = sol1
  rev1: Revolve2D "Revolution 2D 1" | data = dset1; startangle = -90; revangle = 225

Derived values
  gev1: EvalGlobal "Reflectance (ewfd)" | data = dset1; table = tbl2; expr = {ewfd.Rport_1, ewfd.Rtotal}
  gev2: EvalGlobal "Reflectance (ewfd) 1" | data = dset1; table = tbl3; expr = {ewfd.Rport_1, ewfd.Rtotal}
  gev3: EvalGlobal "Reflectance (ewfd) 2" | data = dset1; table = tbl4; expr = {ewfd.Rport_1, ewfd.Rtotal}
  gev4: EvalGlobal "Reflectance (ewfd) 3" | data = dset1; table = tbl5; expr = {ewfd.Rport_1, ewfd.Rtotal}
  gev5: EvalGlobal "Reflectance (ewfd) 4" | data = dset1; table = tbl6; expr = {ewfd.Rport_1, ewfd.Rtotal}
  gev6: EvalGlobal "Reflectance (ewfd) 5" | data = dset1; table = tbl7; expr = {ewfd.Rport_1, ewfd.Rtotal}
  gev7: EvalGlobal "Reflectance (ewfd) 6" | data = dset1; table = tbl8; expr = {ewfd.Rport_1, ewfd.Rtotal}
  gev8: EvalGlobal "Reflectance (ewfd) 7" | data = dset1; table = tbl9; expr = {ewfd.Rport_1, ewfd.Rtotal}
  gev9: EvalGlobal "Reflectance (ewfd) 8" | data = dset1; table = tbl10; expr = {ewfd.Rport_1, ewfd.Rtotal}
  gev10: EvalGlobal "Reflectance (ewfd) 9" | data = dset1; table = tbl11; expr = {ewfd.Rport_1, ewfd.Rtotal}

Evaluation groups
  eg1: EvaluationGroup | data = dset1
    int1: IntSurface "Surface Integration 1" on domains 25
      expr = real(ewfd.Er*conj(ewfd.ecd1.Jer)+ewfd.Ephi*conj(ewfd.ecd1.Jephi)+ewfd.Ez*conj(ewfd.ecd1.Jez))
    int2: IntLine "Line Integration 2" on selection geom1_csel16_bnd
      expr = real(ewfd.Er*conj(ewfd.Hphi)-ewfd.Ephi*conj(ewfd.Hr))
    int3: IntLine "Line Integration 3" on selection geom1_csel17_bnd
      expr = real(ewfd.Er*conj(ewfd.Hphi)-ewfd.Ephi*conj(ewfd.Hr))
    int4: IntLine "Line Integration 4" on selection geom1_csel18_bnd
      expr = real(ewfd.Ephi*conj(ewfd.Hz)-ewfd.Ez*conj(ewfd.Hphi))
    int6: IntLine "Line Integration 6" on selection geom1_csel18_bnd | expr = ewfd.Poavr*2
    int5: IntSurface "Surface Integration 5" on domains 25
      expr = real(ewfd.Er*conj(ewfd.Jr)+ewfd.Ephi*conj(ewfd.Jphi)+ewfd.Ez*conj(ewfd.Jz))

Tables
  tbl2: Table
    freq (Hz) | Reflectance, port 1 (1) | Total reflectance (1) | Reflectance, port 1 (1) | Total reflectance (1)
    3.74741e+13 | 0.0902609 | 0.0902609 | 0.240858 | 0.240858
  tbl3: Table
    freq (Hz) | Reflectance, port 1 (1) | Total reflectance (1)
    2.14137e+13 | 0.745822 | 0.745822
  tbl4: Table
    freq (Hz) | Reflectance, port 1 (1) | Total reflectance (1)
    2.14137e+13 | 0.745822 | 0.745822
  tbl5: Table
    freq (Hz) | Reflectance, port 1 (1) | Total reflectance (1)
    2.14137e+13 | 0.745818 | 0.745818
  tbl6: Table
    freq (Hz) | ewfd.Rport_1 (1) | ewfd.Rtotal (1)
    2.14137e+13 | 0.745874 | 0.745874
  tbl7: Table
    freq (Hz) | ewfd.Rport_1 (1) | ewfd.Rtotal (1)
    2.14137e+13 | 0.764842 | 0.764842
  tbl8: Table
    freq (Hz) | Reflectance, port 1 (1) | Total reflectance (1)
    2.14137e+13 | 0.77149 | 0.77149
  tbl9: Table
    freq (Hz) | Reflectance, port 1 (1) | Total reflectance (1)
    2.14137e+13 | 0.746745 | 0.746745
  tbl10: Table
    freq (Hz) | ewfd.Rport_1 (1) | ewfd.Rtotal (1)
    2.14137e+13 | 0.745282 | 0.745282
  tbl11: Table
    freq (Hz) | Reflectance, port 1 (1) | Total reflectance (1)
    2.14137e+13 | 0.74523 | 0.74523
  rp1: Table "Directivity"
    // Radiation pattern
    θ (deg) | φ (deg) | Directivity | Directivity (dB)
    6.03352 | 0 | 5.14084 | 7.11034
  rp2: Table "Directivity 1"
    // Radiation pattern
    θ (deg) | φ (deg) | Directivity | Directivity (dB)
    55.3073 | 0 | 2.58342 | 4.12194

Plots
  pg1: PlotGroup2D "Electric Field (ewfd)" | data = dset1; dataisaxisym = on
    surf1: Surface | expr = imag(material.def.epsilonr_iso)